// SBML level 3 version 2

model simple_biliary_excretion()
  // model units - substance: NanoGM, time: HR, volume: L, extent: NanoGM

  // Compartments:
  compartment Blood; Blood has L; Blood is "blood";
  compartment Liver; Liver has L; Liver is "liver";
  compartment Gut; Gut has L; Gut is "gut";
  compartment Feaces; Feaces has L; Feaces is "feaces";

  // Species:
  substanceOnly species AGut in Gut = 0; AGut is "amount of chemical in gut";
  substanceOnly species ABlood in Blood = 0; ABlood is "amount of chemical in blood";
  substanceOnly species ALiver in Liver = 0; ALiver is "amount of chemical in liver";
  substanceOnly species AFeaces in Feaces = 0; AFeaces is "amount of chemical in feaces";

  // Parameters:
  BW = 60 KiloGM; BW is "body weight";
  VGc = 0.0171 L_PER_KiloGM;
  VLc = 0.026 L_PER_KiloGM;
  VBc = 0.0428 L_PER_KiloGM;
  QCc = 12.5 L_PER_HR_PER_KiloGM0P75;
  QGc = 0.181 UNITLESS;
  QLc = 0.25 UNITLESS;
  PCLiver = 2.2 UNITLESS;
  PCGut = 0.05 UNITLESS;
  Free = 0.02 UNITLESS;
  Kbiliaryc = 0.000109 L_PER_KiloGM_HR;
  KfeacesC = 2.17e-6 L_PER_KiloGM_HR;
  QC has L_PER_HR;
  QL has L_PER_HR;
  QG has L_PER_HR;
  Kbiliary has L_PER_HR;
  Kfeaces has L_PER_HR;

  // Assignment rules:
  Blood := BW*VBc;
  Liver := BW*VLc;
  Gut := BW*VGc;
  QC := QCc*BW^0.75;
  QL := QC*QLc;
  QG := QC*QGc;
  Kbiliary := Kbiliaryc*BW^0.1;
  Kfeaces := KfeacesC*BW^0.001;

  // Reactions:
  _J0: AGut -> ALiver; QG*Free*(AGut/Gut)/PCGut;
  _J1: AGut -> ABlood; QG*Free*(AGut/Gut)/PCGut;
  _J2: ABlood -> ALiver; QL*Free*(ABlood/Blood)/Free;
  _J3: ABlood -> AGut; QG*Free*(ABlood/Blood)/Free;
  _J4: ALiver -> ABlood; (QL + QG)*Free*(ALiver/Liver)/PCLiver;
  _J5: ALiver -> AGut; Kbiliary*Free*(ALiver/Liver)/PCLiver;
  _J6: AGut -> AFeaces; Kfeaces*Free*(AGut/Gut)/PCGut;

  // Unit definitions:
  unit NanoGM = 1e-9 gram;
  unit HR = 3600 second;
  unit L = litre;
  unit KiloGM = 1000 gram;
  unit L_PER_KiloGM = litre / (1000 gram);
  unit L_PER_HR_PER_KiloGM0P75 = litre / (3600 second * (1000 gram)^0.75);
  unit UNITLESS = dimensionless;
  unit L_PER_KiloGM_HR = litre / (1000 gram * 3600 second);
  unit L_PER_HR = litre / (3600 second);
end
